// COMSOL Multiphysics 6.0.0.354 model "CR_Joan_4.2.mph"
// Outline of the model tree

Parameters
  a = 1 [um]  // Lattice Period
  w_1 = a/2  // Film 1 Thickness
  w_2 = a/2  // Film 2 Thickness
  H = 0.2 [um]  // Film Plane Height
  E_1 = 13  // Permativity 1
  E_2 = 13  // Permativity 2
  X_x = b_x  // X point, x coordinate
  b_x = pi/a  // Reciprical Vector
  k = 0 [rad/m]  // Wave Vector (Variable)
  k_i = -X_x  // Intial Wave Vector Value
  k_f = X_x  // Final Wave Vector Value
  res = 40  // Plot Resolution

Geometry
  geom1 "Geometry 1" (2D, length unit µm)
    r1: Rectangle "Film_1" | layerbottom = off; size = {w_1*2, H}
    r2: Rectangle "Film_2" | pos = {w_1, 0}; size = {w_2, H}
    fin: Finalize "Form Union"

Materials
  flm1: Common "Film_1" on domains 1
    def "Basic"
      relpermittivity = E_1
      relpermeability = 1
      electricconductivity = 0
  flm2: Common "Film_2" on domains 2
    def "Basic"
      relpermittivity = E_2
      relpermeability = 1
      electricconductivity = 0

Physics
  ewfd: ElectromagneticWavesFrequencyDomain on all domains
    dependent variable E = {Ex, Ey, Ez}
    MeshControl.SizeControlParameter = Frequency
    MeshControl.PhysicsControlledMeshMaximumFrequency = 300 [THz]
    wee1: WaveEquationElectric (default)
    pec1: PerfectElectricConductor (default)
    init1: init "Initial Values 1" (default)
    pc1: PeriodicCondition on boundaries 1, 7
      PeriodicType = Floquet
      kFloquet = {k, 0, 0}
      destinationDomains: boundaries 7
    pc2: PeriodicCondition on boundaries 2, 3, 5, 6 | destinationDomains: boundaries 3, 6

Mesh
  mesh1 "Mesh 1" (physics-controlled)

Studies
  std1 "Study 1"
    param2: Parametric "Permativity Sweep" | pname = E_2; plistarr = 13 12 1
    param: Parametric "k Sweep" | pname = k; plistarr = range(k_i,(k_f-(k_i))/(res-1),k_f); punit = rad/m
    eig: Eigenfrequency | neigs = 8; shift = 0.1; eigwhich = lr

Solver configurations
  sol1 "Solution 1" (study std1)
    v1: Variables "Dependent Variables 1"
    e1: Eigenvalue "Eigenvalue Solver 1" | transform = eigenfrequency; neigs = 8; shift = 0.1; eigwhich = si
      d1: Direct "Suggested Direct Solver (ewfd)"
  sol2 "Parametric Solutions 1" (study std1)

Datasets
  dset1: Solution | solution = sol1
  dset2: Solution | solution = sol2

Derived values
  gev1: EvalGlobal "Eigenfrequencies (ewfd)"
    data = dset2
    table = tbl2
    expr = {ewfd.freq, ewfd.Qfactor}
    unit = {THz, }
    descr = {Frequency, Quality factor}

Tables
  tbl2: Table
    k (1/m) | Eigenfrequency (THz) | Frequency (THz) | Quality factor (1)
    -3.14159e+06 | 92.964+6.56618e-15i | 92.964 | 7.07899e+15
    -3.14159e+06 | 92.964+4.6327e-15i | 92.964 | 1.00334e+16
    -3.14159e+06 | 92.9692-1.12161e-14i | 92.9692 | 4.14447e+15
    -3.14159e+06 | 92.9693+9.55563e-15i | 92.9693 | 4.86463e+15
    -3.14159e+06 | 92.9693-3.26367e-15i | 92.9693 | 1.4243e+16
    -3.14159e+06 | 92.9693+6.00851e-15i | 92.9693 | 7.73647e+15
    -3.07813e+06 | 92.5966+3.30411e-14i | 92.5966 | 1.40123e+15
    -3.07813e+06 | 92.5966-5.96425e-14i | 92.5966 | 7.76263e+14
    -3.07813e+06 | 93.3424-1.83225e-14i | 93.3424 | 2.54721e+15
    -3.07813e+06 | 93.3427-4.50476e-14i | 93.3427 | 1.03604e+15
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
Plots
  pg2: PlotGroup1D "1D Plot Group 2"
    data = dset2
    title = Joannopoulus Figure 4.2
    xlabel = ka/2π
    ylabel = Frequency ωa/2πc
    glob1: Global | expr = ewfd.freq*a/c_const; unit = 1; xdata = expr; xdataexpr = k*a/(2*pi)
  pg1: PlotGroup2D "Electric Field (ewfd)" (disabled) | data = dset2
    surf1: Surface | expr = ewfd.normE